# Лабараторная работа №1 Вариант 9
x := 3
n := 9
a := 4*sqrt(5 - 2*sqrt(6))/((nthroot(2, 4) + nthroot(3, 4))*(nthroot(2, 4) - nthroot(3, 4))) = -4
y := sqrt(x^3 + n) + cos(|n*x - 1|)/nthroot(x^5 + 8*x + n, 4) = 6.15872
t := (sum(sin(i/n), i = 1 .. 10) + sum((i - n)/(i + n), i = 1 .. 5))/product((n + 3*i)/(n^2 + n*i - n), i = 1 .. 5) = 15878.6
x := -2, -1.8 .. 2
y(x) := (3 - tan(2*x)^2 - 2*ln(x^2))^(3*x)
x = [-2; -1.8; -1.6; -1.4; -1.2; -1; -0.8; -0.6; -0.4; -0.2; 0; 0.2; 0.4; 0.6; 0.8; 1; 1.2; 1.4; 1.6; 1.8; 2]
y(x) = [0.525659; 131.145; 0.589053; 0.168666; 0.274794; -0.178997; 1.34321e-8 - 4.13397e-8i; 0.358108 + 0.260181i; 0.126389; 0.263064; 1; 3.80135; 7.91209; 1.82768 - 1.32789i; 7109216 + 21879918i; -5.58668; 3.63909; 5.92886; 1.69764; 0.00762514; 1.90237]
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# Матрицы
# 3.
A := [4, 7, 0; 5, 0, 2; 3, 1, 9]
B := [4, 5, 8; 8, 0, 3; 0, 1, 9]
V := [7; 0; 2]
d := |A|*|B| = 86548
c := A*B = [72, 20, 53; 20, 27, 58; 20, 24, 108]
s := B*V = [44; 62; 18]
g := transpose(V)*A*V = 274
E := A^-1*c - B = [0, 1.77636e-15, 3.55271e-15; -1.77636e-15, 0, 0; -4.44089e-16, -2.22045e-16, 0]
p := min(B) = 0
q := max(A) = 9
Интегралы
# 4.
a := π/6
b := π
integral((t - 1)*cos(n*t - 6)/sqrt(sin(t^2) + 8), t = a .. b) = -0.0521795
# График поверхности
y := -6, -5.8 .. 6
# 5.
x := -6, -5.8 .. 6
f(x, y) := sin(x)/x + sin(y)/y
# [component: inputs f]
