# Лабараторная работа №2
# Вариант 9
# 1.
x := -3, -2.9 .. 3
dx := 0.1
f(x) := 2*x + cos(2*x) - 3
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x := 2  # Найдем корни с помощью root
root(f(x), x) = 1.89719
x := -3, -2.9 .. 3
dx := 0.1
f(x) := 3^x - 2.5 - x
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x := -2.4
root(f(x), x) = -2.43078
x := 1.2
root(f(x), x) = 1.18792
# 2.
# x^4 + x^3 - 17*x^2 - 45*x - 100 = 0
# Определяем вектор коэффициентов
V := [-100; -45; -17; 1; 1]
# Формируем вектор корней с использованием polyroots()
y := polyroots(V) = [-4; -1 - 2i; -1 + 2i; 5]
# 3.
# 1) Find
x1 := 1
x2 := 1
x3 := 1
x4 := 1
Given
2*x1 + x2 - 5*x3 + x4 == -4
x1 - 3*x2 - 6*x4 == -7
2*x2 - x3 + 2*x4 == 2
x1 + 4*x2 - 7*x3 + 6*x4 == -2
v := Find(x1, x2, x3, x4)
v = [2; 1; 2; 1]
# 2) Матричный сапособ
2*x1 + x2 - 5*x3 + x4 == -4
x1 - 3*x2 - 6*x4 == -7
2*x2 - x3 + 2*x4 == 2
x1 + 4*x2 - 7*x3 + 6*x4 == -2
A := [2, 1, -5, 1; 1, -3, 0, -6; 0, 2, -1, 2; 1, 4, -7, 6]
B := [-4; -7; 2; -2]
# Найдем корни по формуле
x := A^-1*B
x = [2; 1; 2; 1]
# 3) Функция lsolve
2*x1 + x2 - 5*x3 + x4 == -4
x1 - 3*x2 - 6*x4 == -7
2*x2 - x3 + 2*x4 == 2
x1 + 4*x2 - 7*x3 + 6*x4 == -2
A := [2, 1, -5, 1; 1, -3, 0, -6; 0, 2, -1, 2; 1, 4, -7, 6]
B := [-4; -7; 2; -2]
lsolve(A, B) = [2; 1; 2; 1]
y := 1
# 4.
x := 1
Given
sin(y) + x == -0.4
2*y - cos(x + 1) == 0
V := Minerr(x, y)
V = [-0.876056; 0.496164]
