# Лабараторная работа №3
# Вариант 9
# 1.
limit((x^3 + 4*x^2 + 4*x)/((x + 2)*(x - 3)), x → -2) → 0
d/dx((3 - tan(2*x)^2 - 2*ln(x^2))^(3*x)) → 3*ln(3 - 2*ln(x^2) - tan(2*x)^2)*(3 - 2*ln(x^2) - tan(2*x)^2)^(3*x) - 3*x*(2*tan(2*x)*(2*tan(2*x)^2 + 2) + 4/x)*(3 - 2*ln(x^2) - tan(2*x)^2)^(3*x - 1)
integral(1/sqrt(cos(x)^2 - 2*sin(x)^2), x) → integral((cos(x)^2 - 2*sin(x)^2)^(-1/2), x)
# 2.Символика
# 1)
2*x + cos(2*x) - 3 == 0
0
# 2)
3^x - 2.5 - x == 0
-2.43078144875
# 3)
x^4 + x^3 - 17*x^2 - 45*x - 100 == 0
[-4; 5; -1 + 2i; -1 - 2i]
# 3 графика на одной системе координат
# 3.
x := -5, -4.9 .. 5
f1(x) := sqrt(x)
f2(x) := e^x
f3(x) := ln(x)
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# 4. IF
a := 4.43
j := a, a + 0.1 .. 5.43
x := -1.55*10^-4
F(j) := if(j < 4.5, sin(j + a), sqrt(|x|) + j^2)
F(j) = [0.535228; 20.5333; 21.4493; 22.3853; 23.3413; 24.3173; 25.3133; 26.3293; 27.3653; 28.4213; 29.4973]
