# Лабараторная работа №4
# Вариант 9
# Задание №1
# z=(x^2+2*x-3+(x+1)*sqrt(x^2-9)) / (x^2-2*x-3+(x-1)*sqrt(x^2-9))
s(x) :=
    z ← (x^2 + 2*x - 3 + (x + 1)*sqrt(x^2 - 9))/(x^2 - 2*x - 3 + (x - 1)*sqrt(x^2 - 9))
    return z
s(4) = 2.64575
# Задание №2
x := 1, 1.5 .. 5
a := 2.5
b(x) :=
    w ← x^3*sqrt(x - a) if x > a
    w ← x*sin(a*x) if x == a
    w ← e^(-a*x)*cos(a*x) if x < a
    return w
b(x) = [-0.0657619; -0.0192977; 0.0019113; -0.082948; 19.0919; 42.875; 78.3837; 128.87; 197.642]
# Задание №3
a := 4.43
x := -1.55*10^-4
k := 5.43
i := 1
L(k) :=
    j ← a
    while j ≤ k
        F[i] ← sin(j + a) if j < 4.5
        F[i] ← sqrt(|x|) + j^2 if j ≥ 4.5
        j ← j + 0.1
        i ← i + 1
        return F[i]
# почему не выкидывает таблицу? вывод же зациклен
L(k) =  # error: Индекс массива является недопустимым для этого массива.
